finish
/clear, start
/cwd, 'C:\Users\eoinl\ThesisCode\Thesis\APDL\Mechanism'
/filname, final_state_element
nsteps = 1
!define vectors for sweeps
nsteps = 1 !number of steps in sweep


! define parameters
w = 5e-3    !width of beam
t1 = 0.4e-3   !thickness of thin flexure
t2 = 2.5e-3   !thickness of reinforced beam on bistable element
t3 = 2.5e-3   !thickness of reinforced beam on end-effector
BL1 = 4e-3     !length of thin flexure
BL2 = 24e-3    !length of reinforced beam on bistable element
h = 5e-3     !flexure spacing
sl = 6e-3     !support length
st = 2e-3     !support thickness
Lr1 = 35e-3           !length of reinforced beam on end-effector
L1 = 6e-3           !length of thin flexure on end-effector
beta1 = 0              !angle of thin flexure on bistable element
beta2 = 8              !angle of reinforced beam on bistable element
beta3 = 0              !angle of second thin flexure on bistable element
alpha = 23*3.1416/180  !angle of reinforced beam on end-effector


!define vectors for sweeps
!Bl1
*dim, BL1_vec, array, nsteps
*vfill, BL1_vec,ramp,BL1, 0 !constant as no increment
!beta13
*dim, beta13_vec, array, nsteps
*vfill, beta13_vec,ramp,beta1, 0
!beta2
*dim, beta2_vec, array, nsteps
*vfill, beta2_vec,ramp,beta2,0
!BL2
*dim, BL2_vec, array, nsteps
*vfill, BL2_vec,ramp,BL2,0
!sl
*dim, sl_vec, array, nsteps
*vfill, sl_vec,ramp,sl,0

zmax = 2*((BL1)*sin(beta1)+BL2*sin(beta2)+BL1*sin(beta3))

! alpha = asin(1-zmax/(2*(L1+Lr1)))  !angle of reinforced beam on end-effector
!alpha = 20*3.1416/180  !angle of reinforced beam on end-effector

/prep7
et, 1, beam188
keyopt, 1, 1, 1 ! Turn on large deflection
MP, EX, 1, 2.2E9  ! Young's modulus for material ID 1
MP, PRXY, 1, 0.3  ! Poisson's ratio for material ID 1
mptemp, 1, 0


MP, EX, 2, 200E12  ! Young's modulus for material ID 2
MP, PRXY, 2, 0.3  ! Poisson's ratio for material ID 2


! Loop over BL1 values and run analysis
*do, i, 1, nsteps
! Assign BL1 value
BL1 = BL1_vec(i)
! Assign beta13 value
beta1 = beta13_vec(i)*3.1416/180
beta3 = beta13_vec(i)*3.1416/180
! Assign beta2 value
beta2 = beta2_vec(i)*3.1416/180
! Assign BL2 value
BL2 = BL2_vec(i)
! Assign sl value
sl = sl_vec(i)
!!!!!!!!!!!!!!!!!!!!!!!!!!!!
!!!!geometry setup  !!!!!!!!!
!!!!!!!!!!!!!!!!!!!!!!!!!!!!
/input, modelsetup, inp


allsel
*get, numNodes, node, 0, count  ! Get number of nodes in model
*get, numElems, elem, 0, count  ! Get number of elements in model
!!!!!!!!!!!!!!!!!!!!!!!!!!!!
!!!!!!!!!! loads !!!!!!!!!!!
!!!!!!!!!!!!!!!!!!!!!!!!!!!!


/solu

antype, 0
nlgeom, on
eqslv, sparse
outres, all, all
autots, on
neqit, 30
deltim, 1e-3, 1e-5, 1e-2, on

!define bcs
cmsel,s,id_fixed_nodes
d,all, all
allsel


d,id_disp,ux,1.9*(Lr1+2*L1)*sin(alpha)

allsel

solve
*get, n_steps1, active, 0, solu, ncmss
!! DISPLAY DEFORMED STATE !!


/post1
/view, 1, 0, 0, 1
subset, last
plnsol,s,eqv


!!Render and save animation
antime,50,0.05
/anfile,save,results%i%,avi


!plotting final force displacement curve
/post26
nsol, 2, id_disp, u, x, displacement
rforce, 3, id_disp, F, x, force
xvar, 2
plvar, 3


!!!!!!!!!!!!!!!!!!!!!!!!!!!!
!!!  save plot .txt file !!!
!!!!!!!!!!!!!!!!!!!!!!!!!!!!


/input, scratch, gui

/post1

*DIM, maxStress, ARRAY, n_steps1, 1  ! Array to store max stress
*DIM, stress, ARRAY, numNodes, 1  ! Array to store stress at each node
*get, numNodes, node, 0, count  ! Get number of nodes in model

! !*do, k, 1, n_steps1
! *do, k, 1, 1
!     set 1, k
!     etable, Stress, s,eqv,max
!     *vscfun, maxStress(k), MAX, stress  ! Store max stress for step i
! *enddo

! *CFOPEN, stressOutput, txt   ! Open the output file
! *VWRITE, maxStress   ! Write maximum stress to output file
! (ES10.3)
! *CFCLOS                ! Close the output file

*enddo
